// COMSOL Multiphysics 4.3 (Build: 233) model "test_magnetic_harmonic_planar_nonlin.mph"
// Outline of the model tree

Functions
  int1: Interpolation
    funcs = {mur_nonlin, 1}
    source = table
    funcname = mur_nonlin
    table = 
      {0, 13001}
      {0.227065, 13001}
      {0.45413, 13001}
      {0.681195, 12786}
      {0.90826, 12168}
      {1.13533, 10967}
      {1.36239, 7494}
      {1.58935, 1409}
      {1.81236, 315}
      {2.01004, 90}
      {2.13316, 41}
      {2.19999, 26}
      {2.25479, 19}
      {2.29993, 15}
      {2.34251, 12}
      {2.37876, 11}
      {2.41501, 9}
      {2.45126, 8}
      {2.4875, 8}
      {2.52375, 7}
      {2.56, 6}
      {3, 4}
      {5, 3}
      {10, 3}
      {20, 2}
    interp = linear
    extrap = const

Geometry
  geom1 "Geometry 1" (2D, length unit m)
    CO1: Composite "Composite Object 1" | filename = $FILENAME$_geom1_CO1.mphbin
    pt1: Point | p = {-0.0020, 4.0E-4}
    fin: Finalize "Form Union"

Physics
  emqa: InductionCurrents "Magnetic Fields" on all domains
    dependent variable A = {Ax, Ay, Az}
    al1: AmperesLaw "Ampère's Law 1" (default)
      sigma_mat = userdef
      sigma = 5e6
      epsilonr_mat = userdef
      epsilonr = 1
      ConstitutiveRelationH = RelativePermeability
      mur_mat = userdef
      mur = mur_nonlin(emqa.normB)
      normH_mat = userdef
      normH = 1/mu0_const*emqa.normB
      minput_frequency = freq
    mi1: MagneticInsulation (default)
    init1: init "Initial Values 1" (default) | A = {0, 0, x^2+y^2}
    ecd1: ExternalCurrentDensity on domains 1 | Je = {0, 0, 3e6}

Mesh
  mesh3 "Mesh 3" (physics-controlled)
    size: MeshSizeDefault | hauto = 2

Studies
  std1 "Study 1"
    freq: Frequency "Frequency Domain" | plist = 50; mesh = {geom1, mesh3}

Solver configurations
  sol1 "Solver 1" (study std1)
    v1: Variables "Dependent Variables 1"
    s1: Stationary "Stationary Solver 1" | stol = 1.0E-4; nonlin = auto
      fcDef: FullyCoupled | maxiter = 500
      p1: Parametric | pname = freq; plistarr = 50; porder = linear
      d1: Direct

Datasets
  dset1: Solution | solution = sol1
  rev1: Revolve2D "Revolution 2D 1" | data = dset1; genpoints = {{0, 0}, {0, 1}}; startangle = -90; revangle = 225

Derived values
  pev1: EvalPoint "Point Evaluation 1" on points 2 | data = dset1; table = new; expr = emqa.Jz
  int1: IntSurface "Surface Integration 1" on domains 1 | data = dset1; table = tbl1; expr = emqa.Jiz

Tables
  tbl1: Table
    // Surface Integration 1 (emqa.Jiz)
    freq | Induced current density, z component (A)
    50 | -76.3131-25.459i

Plots
  pg1: PlotGroup2D "Magnetic flux density norm" | data = dset1
    surf1: Surface | readytoplot = on; expr = emqa.murxx; unit = 1